<?xml version="1.0" encoding="ISO-8859-1"?>
<neuroml xmlns="http://www.neuroml.org/schema/neuroml2" xmlns:xsi="http://www.w3.org/2001/XMLSchema-instance" xsi:schemaLocation="http://www.neuroml.org/schema/neuroml2 https://raw.github.com/NeuroML/NeuroML2/development/Schemas/NeuroML2/NeuroML_v2beta4.xsd" id="Golgi_KC">

    <notes>ChannelML file containing a single Channel description from Saraga et al 2003</notes>

    <ionChannel id="OLM_IA" conductance="165pS" type="ionChannelHH" species="k">

        <gateHHtauInf id="a" instances="1" rate="1per_ms" midpoint="-14mV" scale="-16.6mV" tau_fix="5ms">
            <q10Settings type="q10ExpTemp" q10Factor="3" experimentalTemp="24 degC"/>
            <timeCoure type="fixedTimeCourse" tau="5ms"/>
            <steadyState type="HHsigmoid" rate="1per_ms" midpoint="-14mV" scale="16.6mV"/>
        </gateHHtauInf>

        <gateHHrates id="b" instances="1">
            <q10Settings type="q10ExpTemp" q10Factor="3" experimentalTemp="24 degC"/>
            <forwardRate type="Saraga2003_IA_alpha" rate="0.000009per_ms" midpoint="-26mV" scale="18.5mV"/>
            <reverseRate type="Saraga2003_IA_beta" rate="0.014per_ms" midpoint="-70mV" scale="-11mV"/>
        </gateHHrates>

    </ionChannel>

    <ComponentType name="Saraga2003_IA_alpha"
                   extends="baseHHRate"
                   description="1/Exponential rate to describe IA in Saraga 2003)">

        <Dynamics>
            <DerivedVariable name="r" exposure="r" value="rate / (exp((v - midpoint)/scale))" dimension="per_time"/>
        </Dynamics>

    </ComponentType>

    <ComponentType name="Saraga2003_IA_beta"
                   extends="baseHHRate"
                   description="sigmoid like rate to describe IA in Saraga 2003)">

        <Dynamics>
            <DerivedVariable name="r" exposure="r" value="rate / (0.2 + exp((v - midpoint)/scale))" dimension="per_time"/>
        </Dynamics>

    </ComponentType>

</neuroml>
